*HEADING
Cook trapezoidal panel, plane stress
**Converged free mid-edge displacement = 23.97
*PART, NAME=part1
*END PART
*ASSEMBLY, NAME=ASSEM1
*INSTANCE, NAME=INSTNC1, PART=PART1
*NODE
1,0.0,0.0
2,1.6,1.4666666666666666
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**We are assuming three node triangles in plane-stress
**CPS3 are pretty poor-accuracy elements, but here we don't care about it.
*ELEMENT, TYPE =CPS3, ELSET=AllElements
1,1,2,32
2,2,33,32
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*NSET, NSET=clamped
1,
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*ORIENTATION,NAME=GlobalOrientation
1.0,0.0,0.0,0.0,1.0,0.0
1,0.0
*SOLID SECTION,MATERIAL=elasticity,ORIENTATION =GlobalOrientation,ELSET=AllElements
1.0,
*END INSTANCE
*END ASSEMBLY
*MATERIAL,NAME=elasticity
*ELASTIC,TYPE=ISOTROPIC
1.0,0.3333333333333333
*STEP,PERTURBATION
*STATIC
*BOUNDARY
ASSEM1.INSTNC1.clamped,1
*BOUNDARY
ASSEM1.INSTNC1.clamped,2
**Concentrated loads: we are assuming that the elements on the boundary
**have two nodes each and also that they are the same length.
**Then the concentrated loads below will be correctly lumped.
*CLOAD
ASSEM1.INSTNC1.31,2,0.016666666666666666
*CLOAD
ASSEM1.INSTNC1.62,2,0.03333333333333333
*CLOAD
ASSEM1.INSTNC1.93,2,0.03333333333333333
*CLOAD
ASSEM1.INSTNC1.124,2,0.03333333333333333
*CLOAD
ASSEM1.INSTNC1.155,2,0.03333333333333333
*CLOAD
ASSEM1.INSTNC1.186,2,0.03333333333333333
*CLOAD
ASSEM1.INSTNC1.217,2,0.03333333333333333
*CLOAD
ASSEM1.INSTNC1.248,2,0.03333333333333333
*CLOAD
ASSEM1.INSTNC1.279,2,0.03333333333333333
*CLOAD
ASSEM1.INSTNC1.310,2,0.03333333333333333
*CLOAD
ASSEM1.INSTNC1.341,2,0.03333333333333333
*CLOAD
ASSEM1.INSTNC1.372,2,0.03333333333333333
*CLOAD
ASSEM1.INSTNC1.403,2,0.03333333333333333
*CLOAD
ASSEM1.INSTNC1.434,2,0.03333333333333333
*CLOAD
ASSEM1.INSTNC1.465,2,0.03333333333333333
*CLOAD
ASSEM1.INSTNC1.496,2,0.03333333333333333
*CLOAD
ASSEM1.INSTNC1.527,2,0.03333333333333333
*CLOAD
ASSEM1.INSTNC1.558,2,0.03333333333333333
*CLOAD
ASSEM1.INSTNC1.589,2,0.03333333333333333
*CLOAD
ASSEM1.INSTNC1.620,2,0.03333333333333333
*CLOAD
ASSEM1.INSTNC1.651,2,0.03333333333333333
*CLOAD
ASSEM1.INSTNC1.682,2,0.03333333333333333
*CLOAD
ASSEM1.INSTNC1.713,2,0.03333333333333333
*CLOAD
ASSEM1.INSTNC1.744,2,0.03333333333333333
*CLOAD
ASSEM1.INSTNC1.775,2,0.03333333333333333
*CLOAD
ASSEM1.INSTNC1.806,2,0.03333333333333333
*CLOAD
ASSEM1.INSTNC1.837,2,0.03333333333333333
*CLOAD
ASSEM1.INSTNC1.868,2,0.03333333333333333
*CLOAD
ASSEM1.INSTNC1.899,2,0.03333333333333333
*CLOAD
ASSEM1.INSTNC1.930,2,0.03333333333333333
*CLOAD
ASSEM1.INSTNC1.961,2,0.016666666666666666
*END STEP
