*HEADING
LE10NAFEMS: Transverse deflection of elliptical plate with elliptical hole.
*PART, NAME=part1
*END PART
*ASSEMBLY, NAME=ASSEM1
*INSTANCE, NAME=INSTNC1, PART=PART1
*NODE
1,2.0,0.0,0.0
2,2.0625,0.0,0.0
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*ELEMENT, TYPE =c3d10, ELSET=AllElements
1,2,548,526,527,4726,4727,4728,4729,4730,4731
2,1,547,526,548,4732,4733,4734,4735,4736,4727
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*ELEMENT, TYPE =SFM3D6, ELSET=TractionElements
23041,4223,4201,4202,4830,4834,4833
23042,4222,4201,4223,4836,4830,4839
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*NSET, NSET=l1
505,
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*NSET, NSET=l2
1,
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*NSET, NSET=l3
2121,
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*NSET, NSET=l12
21,
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*ORIENTATION,NAME=GlobalOrientation
1.0,0.0,0.0,0.0,1.0,0.0
1,0.0
*SOLID SECTION,MATERIAL=elasticity,ORIENTATION =GlobalOrientation,ELSET=AllElements, CONTROLS  =Hourglassctl
*SURFACE SECTION, ELSET=TractionElements
*END INSTANCE
*END ASSEMBLY
*MATERIAL,NAME=elasticity
*ELASTIC,TYPE=ISOTROPIC
2.1e11,0.3
*SECTION CONTROLS, NAME=Hourglassctl,HOURGLASS=ENHANCED
*STEP,PERTURBATION
*STATIC
*BOUNDARY
ASSEM1.INSTNC1.l1,1
*BOUNDARY
ASSEM1.INSTNC1.l2,2
*BOUNDARY
ASSEM1.INSTNC1.l3,3
*BOUNDARY
ASSEM1.INSTNC1.l12,1
*BOUNDARY
ASSEM1.INSTNC1.l12,2
*DLOAD, follower=NO
ASSEM1.INSTNC1.TractionElements,TRVEC,1.0e6,0.0,0.0,-1.0
*END STEP
