*HEADING
LE11NAFEMS: Linear bricks.
*PART, NAME=part1
*END PART
*ASSEMBLY, NAME=ASSEM1
*INSTANCE, NAME=INSTNC1, PART=PART1
*NODE
1,-0.47139673682599764,0.881921264348355,0.0
2,-0.6599554315563967,1.234689770087697,0.0
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*ELEMENT, TYPE =c3d8rh, ELSET=AllElements
1,1,17,39,20,46,62,84,65
2,2,18,39,17,47,63,84,62
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*END INSTANCE
*END ASSEMBLY
*STEP, name=Buckling, nlgeom=NO, perturbation
*BUCKLE
1, , , ,
*CLOAD
1,2,10.0
*EL PRINT, ELSET=AllElements, POSITION=INTEGRATION POINTS, SUMMARY= YES

S
*ENERGY PRINT
*END STEP
