*Heading
** Job name: Job-1 Model name: Model-1
** Generated by: Abaqus/CAE 2017
*Preprint, echo=NO, model=NO, history=NO, contact=NO
**
** PARTS
**
*Part, name=Part-1
*Node
      1,   131.639908,  -76.7899475,           0.
      2,   131.639908,  -76.7899475,   609.599976
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*Element, type=C3D10
    1,   834,   835,   836,   837,  2134,  2133,  2132,  2136,  2135,  2137
    2,   834,   838,   837,   839,  2139,  2138,  2136,  2141,  2140,  2142
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*Nset, nset=Set-1, generate
     1,  15264,      1
*Elset, elset=Set-1, generate
     1,  10172,      1
** Section: Section-1
*Solid Section, elset=Set-1, material=Aluminum-1
,
*End Part
**
**
** ASSEMBLY
**
*Assembly, name=Assembly
**
*Instance, name=Part-1-1, part=Part-1
*End Instance
**
*End Assembly
**
** MATERIALS
**
*Material, name=Aluminum-1
*Density
 2.7e-09,
*Elastic
70000., 0.33
** ----------------------------------------------------------------
**
** STEP: Step-1
**
*Step, name=Step-1, nlgeom=NO, perturbation
*Frequency, eigensolver=Lanczos, sim=NO, acoustic coupling=on, normalization=displacement
20, , , , ,
**
** OUTPUT REQUESTS
**
*Restart, write, frequency=0
**
** FIELD OUTPUT: F-Output-1
**
*Output, field, variable=PRESELECT
*End Step
