*Heading
** Job name: barrelvault_s3r_fineirreg Model name: barrelvault_s3r_fineirreg
** Generated by: Abaqus/CAE Student Edition 2020
*Preprint, echo=NO, model=NO, history=NO, contact=NO
**
** PARTS
**
*Part, name=PART-1
*Node
      1,         300.,           0.,           0.
      2,         300.,           0.,        18.75
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*Element, type=S3R
   1,    1,  203,  201
   2,    1,    3,  203
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*Elset, elset=ROOF
    1,    2,    3,    4,    5,    6
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** Section: Section-1-ROOF
*Shell Section, elset=ROOF, material=STEEL
3., 3
*End Part
**
**
** ASSEMBLY
**
*Assembly, name=Assembly
**
*Instance, name=PART-1-1, part=PART-1
*End Instance
**
*MPC
BEAM, PART-1-1.2409, PART-1-1.1601
BEAM, PART-1-1.2209, PART-1-1.1603
BEAM, PART-1-1.2009, PART-1-1.1605
BEAM, PART-1-1.1809, PART-1-1.1607
*Nset, nset=ALL, instance=PART-1-1
    1,    2,    3,    4,    5,    6
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*Nset, nset=APEX, instance=PART-1-1, generate
  1,  25,   1
*Nset, nset=APEX1, instance=PART-1-1, generate
 1,  9,  1
*Nset, nset=APEX2, instance=PART-1-1, generate
  9,  25,   1
*Nset, nset=CORNER, instance=PART-1-1
    1,    9,   25, 1601, 1609, 1625, 2409, 2425
*Nset, nset=FREE, instance=PART-1-1, generate
 2409,  2425,     1
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*Elset, elset=ROOF1, instance=PART-1-1
 1,
*Nset, nset=SYMM, instance=PART-1-1, generate
   25,  2425,   100
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*Nset, nset=WALL, instance=PART-1-1, generate
    1,  1601,   100
*End Assembly
**
** MATERIALS
**
*Material, name=STEEL
*Elastic
 3e+06,0.
**
** BOUNDARY CONDITIONS
**
** Name: Disp-BC-1 Type: Symmetry/Antisymmetry/Encastre
*Boundary
APEX, YSYMM
** Name: Disp-BC-2 Type: Symmetry/Antisymmetry/Encastre
*Boundary
SYMM, ZSYMM
** Name: Disp-BC-3 Type: Displacement/Rotation
*Boundary
WALL, 1, 1
WALL, 2, 2
** ----------------------------------------------------------------
**
** STEP: Step-1
**
*Step, name=Step-1, nlgeom=NO
SELF-WEIGHT
*Static
1., 1., 1e-05, 1.
**
** LOADS
**
** Name: BODYFORCE-1   Type: Body force
*Dload
PART-1-1.ROOF, BX, -0.20833
**
** OUTPUT REQUESTS
**
*Restart, write, frequency=0
**
** FIELD OUTPUT: F-Output-1
**
*Output, field, variable=PRESELECT
**
** HISTORY OUTPUT: H-Output-1
**
*Output, history, variable=PRESELECT
*End Step
