*Heading
** Job name: Job-2 Model name: Model-1
** Generated by: Abaqus/CAE Student Edition 2020
*Preprint, echo=NO, model=NO, history=NO, contact=NO
**
** PARTS
**
*Part, name=Part-1
*Node
      1,          2.5,           0.,           0.
      2,          2.5,           0.,           1.
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*Element, type=DC3D4
   1, 242, 195, 243, 244
   2, 242, 244, 186, 195
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*Nset, nset=the-region, generate
   1,  358,    1
*Elset, elset=the-region, generate
    1,  1318,     1
*Nset, nset=Top-face
   2,  33,  34,  35,  36,  37
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*Nset, nset=bottom-face
   1,   3,   4,   5,   6,   7
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*Elset, elset=_top-surface_S3, internal
   16,   17,   37,   49,   59,   75
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*Elset, elset=_top-surface_S4, internal
   71,  161,  358,  697,  771,  872,  995, 1056, 1066, 1144, 1258, 1276
*Elset, elset=_top-surface_S1, internal
  192,  238,  298,  969, 1053, 1161
*Elset, elset=_top-surface_S2, internal
  527,  759,  976,  979,  996, 1017, 1049, 1175, 1248, 1250, 1253
*Surface, type=ELEMENT, name=top-surface
_top-surface_S3, S3
_top-surface_S4, S4
_top-surface_S2, S2
_top-surface_S1, S1
*Elset, elset=_bottom-surface_S3, internal
   62,   72,   73,  105,  132,  134
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*Elset, elset=_bottom-surface_S2, internal
   81,   86,  376,  412,  541,  554,  867,  959, 1087, 1290
*Elset, elset=_bottom-surface_S4, internal
   88,   95,  204,  305,  400,  566,  824, 1083, 1093, 1114, 1212, 1243, 1262, 1287, 1301
*Elset, elset=_bottom-surface_S1, internal
  151,  211,  393,  610, 1088
*Surface, type=ELEMENT, name=bottom-surface
_bottom-surface_S3, S3
_bottom-surface_S2, S2
_bottom-surface_S4, S4
_bottom-surface_S1, S1
*Elset, elset=_side-surface_S3, internal
  117,  159,  192,  260,  268,  358
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*Elset, elset=_side-surface_S1, internal
  198,  552,  554,  767, 1047, 1068, 1098, 1142, 1183, 1282, 1304, 1314
*Elset, elset=_side-surface_S4, internal
  508,  585,  758,  800, 1050, 1159, 1163, 1179, 1185, 1186
*Elset, elset=_side-surface_S2, internal
 1038, 1090, 1162, 1217, 1294, 1296
*Surface, type=ELEMENT, name=side-surface
_side-surface_S3, S3
_side-surface_S1, S1
_side-surface_S4, S4
_side-surface_S2, S2
** Section: the-section
*Solid Section, elset=the-region, material=the-material
,
*End Part
**
**
** ASSEMBLY
**
*Assembly, name=Assembly
**
*Instance, name=Part-1-1, part=Part-1
*End Instance
**
*Nset, nset=the-side, instance=Part-1-1
   1,   2,   3,   4,   5,   6
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*Elset, elset=the-side, instance=Part-1-1
  117,  159,  192,  198,  260,  268
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*End Assembly
**
** MATERIALS
**
*Material, name=the-material
*Conductivity
 1.8,
** ----------------------------------------------------------------
**
** STEP: the-step
**
*Step, name=the-step, nlgeom=NO
*Heat Transfer, steady state, deltmx=0.
1., 1., 1e-05, 1.,
**
** BOUNDARY CONDITIONS
**
** Name: the-side-BC Type: Temperature
*Boundary
the-side, 11, 11
**
** LOADS
**
** Name: the-source   Type: Body heat flux
*Dflux
Part-1-1.the-region, BF, 4.5
**
** OUTPUT REQUESTS
**
*Restart, write, frequency=0
**
** FIELD OUTPUT: F-Output-1
**
*Output, field, variable=PRESELECT
**
** HISTORY OUTPUT: the-history
**
*Output, history
*Contact Output
HFLA, HTL, HTLA, SJD, SJDA, SJDT, SJDTA, WEIGHT
*Radiation Output
FTEMP, RADFL, RADFLA, RADTL, RADTLA, VFTOT
*End Step
